*Heading
** Job name: Moving_HF Model name: Model-1
** Generated by: Abaqus/CAE 2023
*Preprint, echo=NO, model=NO, history=NO, contact=NO
**
** PARTS
**
*Part, name=Part-1
*Node
      1, -0.0500000007, -0.100000001, 0.0199999996
      2, -0.0500000007, -0.0979999974, 0.0199999996
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*Element, type=DC3D8
    1,   562,   563,   614,   613,     1,     2,    53,    52
    2,   563,   564,   615,   614,     2,     3,    54,    53
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*Nset, nset=Set-1, generate
     1,  28611,      1
*Elset, elset=Set-1, generate
     1,  25000,      1
** Section: AL
*Solid Section, elset=Set-1, material=AL
,
*End Part
**
**
** ASSEMBLY
**
*Assembly, name=Assembly
**
*Instance, name=Part-1-1, part=Part-1
*End Instance
**
*Nset, nset=Set-1, instance=Part-1-1, generate
     1,  28611,      1
*Elset, elset=Set-1, instance=Part-1-1, generate
     1,  25000,      1
*Elset, elset=_Surf-1_S3, internal, instance=Part-1-1
     1,     2,     3,     4,     5,     6
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*Surface, type=ELEMENT, name=Surf-1
_Surf-1_S3, S3
*Elset, elset=_Surf-2_S1, internal, instance=Part-1-1, generate
 24501,  25000,      1
*Elset, elset=_Surf-2_S6, internal, instance=Part-1-1, generate
     1,  24951,     50
*Elset, elset=_Surf-2_S2, internal, instance=Part-1-1, generate
   1,  500,    1
*Elset, elset=_Surf-2_S4, internal, instance=Part-1-1, generate
    50,  25000,     50
*Elset, elset=_Surf-2_S5, internal, instance=Part-1-1
   451,   452,   453,   454,   455,   456
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*Surface, type=ELEMENT, name=Surf-2
_Surf-2_S1, S1
_Surf-2_S6, S6
_Surf-2_S2, S2
_Surf-2_S4, S4
_Surf-2_S5, S5
*End Assembly
**
** MATERIALS
**
*Material, name=AL
*Conductivity
205.,
*Density
2710.,
*Specific Heat
921.,
**
** PREDEFINED FIELDS
**
** Name: Predefined Field-1   Type: Temperature
*Initial Conditions, type=TEMPERATURE
Set-1, 298.
** ----------------------------------------------------------------
**
** STEP: Step-1
**
*Step, name=Step-1, nlgeom=NO
*Heat Transfer, end=PERIOD
1., 100., , ,
**
** LOADS
**
** Name: MOVING ,HF   Type: Surface heat flux
*Dsflux
Surf-1, SNU, 1.
**
** INTERACTIONS
**
** Interaction: Int-1
*Sfilm
Surf-2, F, 298., 20.
**
** OUTPUT REQUESTS
**
*Restart, write, frequency=0
**
** FIELD OUTPUT: F-Output-1
**
*Output, field, variable=PRESELECT
*Output, history, frequency=0
*End Step
